! ASTERION FCTA-1 v0.3 preliminary BEAM188 line model
! Units: mm, N, s, MPa; density in tonne/mm^3
/PREP7
ET,1,BEAM188
MP,EX,1,71700.0
MP,PRXY,1,0.33
MP,DENS,1,2.81E-9
SECTYPE,1,BEAM,CTUBE,LONGERON
SECDATA,74.000000,80.000000,16
SECTYPE,2,BEAM,CTUBE,FRAME
SECDATA,55.000000,60.000000,16
SECTYPE,3,BEAM,CTUBE,DIAGONAL
SECDATA,41.000000,45.000000,16
SECTYPE,4,BEAM,CTUBE,RING_BEAM
SECDATA,94.000000,100.000000,16
SECTYPE,5,BEAM,CTUBE,RING_SPOKE
SECDATA,55.000000,60.000000,16
SECTYPE,6,BEAM,CTUBE,INTERFACE_BOOM
SECDATA,65.000000,70.000000,16
SECTYPE,7,BEAM,CTUBE,DOCK_FRAME
SECDATA,65.000000,70.000000,16
! Nodes
N,1,-21000.000000,1200.000000,0.000000
N,2,-21000.000000,848.528137,848.528137
N,3,-21000.000000,0.000000,1200.000000
N,4,-21000.000000,-848.528137,848.528137
N,5,-21000.000000,-1200.000000,0.000000
N,6,-21000.000000,-848.528137,-848.528137
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N,222,21400.000000,565.685425,-565.685425
! Elements
SECNUM,2
E,1,2
SECNUM,2
E,2,3
SECNUM,2
E,3,4
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SECNUM,2
E,6,7
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ALLSEL,ALL
FINISH
