! ASTERION v0.3 linear eigenvalue buckling demonstrator
/CLEAR
/FILNAME,asterion_buckling
/INPUT,asterion_line_model,inc
/SOLU
ANTYPE,STATIC
PSTRES,ON
NSEL,S,LOC,X,-21000.0
D,ALL,ALL,0
ALLSEL,ALL
NSEL,S,LOC,X,21400.0
*GET,NCOUNT,NODE,0,COUNT
F,ALL,FX,-25000/NCOUNT
ALLSEL,ALL
SOLVE
FINISH
/SOLU
ANTYPE,BUCKLE
BUCOPT,LANB,10
MXPAND,10
SOLVE
FINISH
/POST1
SET,LIST
FINISH
